# Vorgegebene Auslegungsdaten:
# Bezeichnung und Wert:  Benennung:
T_an := 50 N*m
# Antriebsdrehmoment
#
# Abtriebsdrehmoment
#
# Schaltdrehzahl
T_ab1 := 650 N*m
n_S := 1100 min^-1
n_an := 2000 min^-1
# Antriebsdrehzahl
#
# Bohr-Abtriebskraft
#
# Belastungsfaktor
F_B := 1.5 kN
K_A := 2.0
# 1) Auslegen der Übersetzung und Bestimmung der Zähnezahlen
# rechnerisches Übersetzungsverhältnis
i_ges := T_ab1/T_an = 13
i_12 := 3.95
i_34 := i_ges/i_12 = 3.29114
i_ges := i_12*i_34 = 13  # Das Gegenrechnen bestätigt den Wert für i_ges
n_ab := n_an/i_ges = 153.846 min^-1
# Zähnezahlen der Zahnräder
z_1 := 25
z_2 := z_1*i_12 = 98.75
z_2 := 99
z_3 := 24
z_4 := z_3*i_34 = 78.9873
z_4 := 79
# tatsächliches Übersetzungsverhältnis
i_12 := z_2/z_1 = 3.96
i_34 := z_4/z_3 = 3.29167
i_ges := i_12*i_34 = 13.035
# Abweichung Abtriebsparameter
T_ab2 := T_an*i_ges = 651.75 N*m  # Das ausgelegte Abtriebsdrehmoment weicht 0,3% im positiven Sinne von den Anforderungen ab.
T_ab2/T_ab1 = 1.00269
n_ab := n_an/i_ges = 153.433 min^-1
# 2) Berechnungen der Wellen und Passfedern
τ_tzul := 50 N/mm^2  # Dauerfestigkeitsschubspannung von 42CrMo4
n_P := 1  # Anzahl Passfedern pro Welle-Nabe Verbindung
φ := 1  # Traganteil der Passfeder
R_e := 295 N/mm^2  # Streckgrenze E295
S_F := 1.1  # Sicherheit Fließgrenze
p_Fzul := R_e/S_F = 268.182 N/mm^2  # Zulässige Flächenpressung einer Passfeder
# Antriebswelle:
d_min1 := nthroot(16*T_an*K_A/(π*τ_tzul), 3) = 21.677 mm
d_W1 := 30 mm
l_t1 := 2*T_an/(d_W1*(7 mm - 4 mm)*n_P*φ*p_Fzul) = 4.14313 mm
b_P1 := 8 mm
# Da die tragende Länge nicht die Abrundungen am Ende beinhaltet, werden beide Radien (zusammen die Breite der Passfeder) addiert und die Gesamtlänge auf die nächste genormte Länge gerundet.
l_P1 := l_t1 + b_P1 = 12.1431 mm
# gewählt: Antriebswelle ⌀ 30mm
# Passfeder DIN 6885 - A8 x 7 x 14
# Vorgelegewelle:
d_min2 := nthroot(16*T_an*K_A*i_12/(π*τ_tzul), 3) = 34.2951 mm
d_W2 := 45 mm
l_t2 := 2*T_an*i_12/(d_W2*(9 mm - 5.5 mm)*n_P*φ*p_Fzul) = 9.3753 mm
b_P2 := 14 mm
# Da die tragende Länge nicht die Abrundungen am Ende beinhaltet, werden beide Radien (zusammen die Breite der Passfeder) addiert und die Gesamtlänge auf die nächste genormte Länge gerundet.
l_P2 := l_t2 + b_P2 = 23.3753 mm
# gewählt: Vorgelegewelle ⌀ 45mm
# Passfeder DIN 6885 - A14 x 9 x 25
# Abtriebswelle:
d_min3 := nthroot(16*T_an*K_A*i_ges/(π*τ_tzul), 3) = 51.0157 mm
d_W3 := 60 mm
l_t3 := 2*T_an*i_ges/(d_W3*(11 mm - 7 mm)*n_P*φ*p_Fzul) = 20.2521 mm
b_P3 := 18 mm
# Da die tragende Länge nicht die Abrundungen am Ende beinhaltet, werden beide Radien (zusammen die Breite der Passfeder) addiert und die Gesamtlänge auf die nächste genormte Länge gerundet.
l_P3 := l_t3 + b_P3 = 38.2521 mm
# gewählt: Vorgelegewelle ⌀ 60mm
# Passfeder DIN 6885 - A18 x 11 x 40
